*Heading
** Job name: BeamEPP Model name: BeamTRI
** Generated by: Abaqus/CAE 2021
*Preprint, echo=NO, model=NO, history=NO, contact=NO
**
** PARTS
**
*Part, name=Part-1
*Node
      1,        -500.,         -50.
      2,        -480.,         -50.
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*USER ELEMENT, TYPE=U2003, NODES=3, COORDINATES=2, PROPERTIES=2, VARIABLES=10, UNSYMM
1,2
*USER ELEMENT, TYPE=U2004, NODES=4, COORDINATES=2, PROPERTIES=2, VARIABLES=10, UNSYMM
1,2
*Element, type=U2003, elset=esfemfreeedge
       1,        1,        2,       53
       5,       52,        1,       53
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*Element, type=U2004, elset=esfemedge
       2,        2,       54,       53,        1
       3,       53,       52,        1,        2
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*Element, type=CPS3, elset=ghost
       655,   1,   2,  53
       656,  53,  52,   1
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*Nset, nset=Fixed, generate
   1,  205,   51
*Elset, elset=Fixed, generate
   2,  302,  100
*Nset, nset=Load
 153,
*Nset, nset=Pin
 103,
** Section: Section-1
*Solid Section, elset=ghost, material=ghostmat
*UEL PROPERTY, ELSET=esfemfreeedge
70000.0000, 0.3000,
*UEL PROPERTY, ELSET=esfemedge
70000.0000, 0.3000,
*End Part
**
**
** ASSEMBLY
**
*Assembly, name=Assembly
**
*Instance, name=Part-1-1, part=Part-1
*End Instance
**
*End Assembly
**
** MATERIALS
**
*Material, name=ghostmat
*Elastic
1.e-8, 0.
**
** BOUNDARY CONDITIONS
**
** Name: FIxed Type: Displacement/Rotation
*Boundary
Part-1-1.Fixed, 1, 1
Part-1-1.Fixed, 6, 6
** Name: Pin Type: Displacement/Rotation
*Boundary
Part-1-1.Pin, 2, 2
** ----------------------------------------------------------------
**
** STEP: Step-1
**
*Step, name=Step-1, nlgeom=YES, inc=10000
*Static
0.001, 1., 1e-12, 0.001
**
** BOUNDARY CONDITIONS
**
** Name: Load Type: Displacement/Rotation
*Boundary
Part-1-1.Load, 2, 2, -170.
**
** OUTPUT REQUESTS
**
*Restart, write, frequency=0
**
** FIELD OUTPUT: F-Output-1
**
*Output, field, variable=PRESELECT
**
** HISTORY OUTPUT: H-Output-1
**
*Output, history, variable=PRESELECT
*End Step
