*Heading
** Job name: Job-2 Model name: Model-2
** Generated by: Abaqus/CAE 2021
*Preprint, echo=NO, model=NO, history=NO, contact=NO
**
** PARTS
**
*Part, name=CrossSection
*Node
      1,           0.,           0.
      2,   1.05499995,           0.
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*USER ELEMENT, TYPE=U2003, NODES=3, COORDINATES=2, PROPERTIES=2, VARIABLES=19, UNSYMM
1,2
*USER ELEMENT, TYPE=U2004, NODES=4, COORDINATES=2, PROPERTIES=2, VARIABLES=19, UNSYMM
1,2
*Element, type=U2003, elset=esfemfreeedge
       2,       11,       12,      104
       7,       24,       23,      116
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*Element, type=U2004, elset=esfemedge
       1,      104,      120,       11,       12
       3,       12,      147,      104,       11
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*Element, type=CPS3, elset=ghost
      1206, 104,  11,  12
      1207, 120,  11, 104
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*Nset, nset=SymX
  1,  2, 10, 11, 12, 13, 14, 15, 16, 17, 18
*Nset, nset=SymY
   1,   9,  65,  66,  67,  68
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*Nset, nset=Load
  8,  9, 58, 59, 60, 61, 62, 63, 64
** Section: Section-1
*Solid Section, elset=ghost, material=ghostmat
,
*UEL PROPERTY, ELSET=esfemfreeedge
70000.0000, 0.3000,
*UEL PROPERTY, ELSET=esfemedge
70000.0000, 0.3000,
*End Part
**
**
** ASSEMBLY
**
*Assembly, name=Assembly
**
*Instance, name=CrossSection-1, part=CrossSection
*End Instance
**
*End Assembly
**
** MATERIALS
**
*Material, name=ghostmat
*Elastic
 1e-08,0.
**
** BOUNDARY CONDITIONS
**
** Name: symX Type: Displacement/Rotation
*Boundary
CrossSection-1.SymX, 2, 2
CrossSection-1.SymX, 6, 6
** Name: symY Type: Displacement/Rotation
*Boundary
CrossSection-1.SymY, 1, 1
CrossSection-1.SymY, 6, 6
** ----------------------------------------------------------------
**
** STEP: Step-1
**
*Step, name=Step-1, nlgeom=YES, inc=100000
*Static
0.001, 1., 1e-12, 0.001
**
** BOUNDARY CONDITIONS
**
** Name: Load Type: Displacement/Rotation
*Boundary
CrossSection-1.Load, 2, 2, 0.35
**
** CONTROLS
**
*Controls, reset
*Controls, parameters=time incrementation
800, 1000, , 1500, 1200, 50, , 125, , ,
**
** OUTPUT REQUESTS
**
*Restart, write, frequency=0
**
** FIELD OUTPUT: F-Output-1
**
*Output, field, variable=PRESELECT
**
** HISTORY OUTPUT: H-Output-1
**
*Output, history, variable=PRESELECT
*End Step
