*Heading
** Job name: NLBeam Model name: NLBeam
** Generated by: Abaqus/CAE Student Edition 2019
*Preprint, echo=NO, model=NO, history=NO, contact=NO
**
** PARTS
**
*Part, name=Beam
*Node
      1,          55.,          10.
      2,          50.,          10.
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*USER ELEMENT, TYPE=U2003, NODES=3, COORDINATES=2, PROPERTIES=2, VARIABLES=10
1,2
*USER ELEMENT, TYPE=U2004, NODES=4, COORDINATES=2, PROPERTIES=2, VARIABLES=10
1,2
*Element, type=U2003, elset=esfemfreeedge
      1,       1,       2,      33
      5,      32,       1,      33
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*Element, type=U2004, elset=esfemedge
      2,       2,      34,      33,       1
      3,      33,      32,       1,       2
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*Element, type=CPS3, elset=ghost
      213,  1,  2, 33
      214, 33, 32,  1
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*Nset, nset=Fixed, generate
 31,  93,  31
*Nset, nset=Load, generate
  1,  63,  31
** Section: Section-1
*Solid Section, elset=ghost, material=ghostmat
,
*UEL PROPERTY, ELSET=esfemfreeedge
70000.0000, 0.3000,
*UEL PROPERTY, ELSET=esfemedge
70000.0000, 0.3000,
*End Part
**
**
** ASSEMBLY
**
*Assembly, name=Assembly
**
*Instance, name=Beam-1, part=Beam
*End Instance
**
*End Assembly
**
** MATERIALS
**
*Material, name=ghostmat
*Elastic
 1e-08,0.
**
** BOUNDARY CONDITIONS
**
** Name: FixedBC Type: Displacement/Rotation
*Boundary
Beam-1.Fixed, 1, 1
Beam-1.Fixed, 2, 2
Beam-1.Fixed, 6, 6
** ----------------------------------------------------------------
**
** STEP: Step-1
**
*Step, name=Step-1, nlgeom=YES, inc=1000
*Static
0.001, 1., 1e-07, 0.001
**
** LOADS
**
** Name: Load-1   Type: Concentrated force
*Cload
Beam-1.Load, 2, 1500.
**
** OUTPUT REQUESTS
**
*Restart, write, frequency=0
**
** FIELD OUTPUT: F-Output-1
**
*Output, field
*Node Output
CF, RF, U
**
** HISTORY OUTPUT: H-Output-1
**
*Output, history, variable=PRESELECT
*End Step
