*Heading
** Job name: PPlate Model name: PPlate_PS
** Generated by: Abaqus/CAE 2021
*Preprint, echo=NO, model=NO, history=NO, contact=NO
**
** PARTS
**
*Part, name=Plate
*Node
      1,   4.73684216,          18.
      2,           0.,          18.
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*USER ELEMENT, TYPE=U2003, NODES=3, COORDINATES=2, PROPERTIES=2, VARIABLES=10
1,2
*USER ELEMENT, TYPE=U2004, NODES=4, COORDINATES=2, PROPERTIES=2, VARIABLES=10
1,2
*Element, type=U2003, elset=esfemfreeedge
        1,         1,        12,        77
        6,        12,        13,       159
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*Element, type=U2004, elset=esfemedge
        2,        12,       159,        77,         1
        3,        77,       646,         1,        12
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*Element, type=CPS3, elset=ghost
        1828,   1,  12,  77
        1829,  12, 159,  77
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*Nset, nset=SymX
   7,   8,   9, 100, 101, 102, 103, 104, 105, 106, 107, 108
*Nset, nset=SymY
  2,  3,  5, 20, 21, 22
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*Nset, nset=Load
   1,   2,  11,  12,  13,  14
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** Section: Section-1
*Solid Section, elset=ghost, material=ghostmat
,
*UEL PROPERTY, ELSET=esfemfreeedge
70000.0000, 0.3000,
*UEL PROPERTY, ELSET=esfemedge
70000.0000, 0.3000,
*End Part
**
**
** ASSEMBLY
**
*Assembly, name=Assembly
**
*Instance, name=Plate-1, part=Plate
*End Instance
**
*End Assembly
**
** MATERIALS
**
*Material, name=ghostmat
*Elastic
0.00000001, 0.
**
** BOUNDARY CONDITIONS
**
** Name: SymmX Type: Displacement/Rotation
*Boundary
Plate-1.SymX, 2, 2
Plate-1.SymX, 6, 6
** Name: SymmY Type: Displacement/Rotation
*Boundary
Plate-1.SymY, 1, 1
Plate-1.SymY, 6, 6
** ----------------------------------------------------------------
**
** STEP: Step-1
**
*Step, name=Step-1, nlgeom=YES, inc=100000, unsymm=YES
*Static
0.001, 1., 1e-05, 0.001
**
** BOUNDARY CONDITIONS
**
** Name: Load Type: Displacement/Rotation
*Boundary
Plate-1.Load, 2, 2, 0.16
**
** OUTPUT REQUESTS
**
*Restart, write, frequency=0
**
** FIELD OUTPUT: F-Output-1
**
*Output, field, variable=PRESELECT
**
** HISTORY OUTPUT: H-Output-1
**
*Output, history, variable=PRESELECT
*End Step
