*Heading
** Job name: TT_Bar Model name: TensileTest
** Generated by: Abaqus/CAE 2021
*Preprint, echo=NO, model=NO, history=NO, contact=NO
**
** PARTS
**
*Part, name=Part-1
*Node
      1,           0.,           0.
      2,   0.50315094,           0.
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*USER ELEMENT, TYPE=U2003, NODES=3, COORDINATES=2, PROPERTIES=2, VARIABLES=19
1,2
*USER ELEMENT, TYPE=U2004, NODES=4, COORDINATES=2, PROPERTIES=2, VARIABLES=19
1,2
*Element, type=U2003, elset=esfemfreeedge
        1,         1,         2,        55
        3,        55,         1,         2
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*Element, type=U2004, elset=esfemedge
        2,         2,        56,        55,         1
        4,         2,         3,        56,        55
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*Element, type=CPS3, elset=ghost
        2134,   1,   2,  55
        2135,   2,  56,  55
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*Nset, nset=symX, generate
  1,  54,   1
*Nset, nset=symY, generate
   1,  703,   54
*Nset, nset=Load, generate
  54,  756,   54
** Section: Section-1
*Solid Section, elset=ghost, material=ghostmat
,
*UEL PROPERTY, ELSET=esfemfreeedge
70000.0000, 0.3000,
*UEL PROPERTY, ELSET=esfemedge
70000.0000, 0.3000,
*End Part
**
**
** ASSEMBLY
**
*Assembly, name=Assembly
**
*Instance, name=Part-1-1, part=Part-1
*End Instance
**
*End Assembly
**
** MATERIALS
**
*Material, name=ghostmat
*Elastic
0.00000001, 0.
**
** BOUNDARY CONDITIONS
**
** Name: symX Type: Displacement/Rotation
*Boundary
Part-1-1.symX, 2, 2
Part-1-1.symX, 6, 6
** Name: symY Type: Displacement/Rotation
*Boundary
Part-1-1.symY, 1, 1
Part-1-1.symY, 6, 6
** ----------------------------------------------------------------
**
** STEP: Step-1
**
*Step, name=Step-1, nlgeom=YES, inc=10000
*Static
0.001, 1., 1e-12, 0.001
*Solution Technique, TYPE=QUASI-NEWTON
**
** BOUNDARY CONDITIONS
**
** Name: Loading Type: Displacement/Rotation
*Boundary
Part-1-1.Load, 1, 1, 5.
**
** CONTROLS
**
*Controls, reset
*Controls, parameters=time incrementation
50, 1000, , 1500, 1200, 50, , 125, , ,
**
** OUTPUT REQUESTS
**
*Restart, write, frequency=0
**
** FIELD OUTPUT: F-Output-1
**
*Output, field
*Node Output
CF, RF, U
*Element Output, directions=YES
E, LE, MISES, PE, PEEQ, PEMAG, S
**
** HISTORY OUTPUT: H-Output-1
**
*Output, history, variable=PRESELECT
*End Step
